# Script to create a Polymer using Patchy Particles (PP)
# Types of Particles:
#   Cross linker:   PPA
#   Monomer:        PPB

# Initialization
units lj
dimension 3
boundary p p p

# Types of atoms and that stuff
atom_style full
bond_style zero nocoeff

# Get data for box and particles
read_data data.patchyP1.lmp group CL
read_data data.patchyP2.lmp add append group Mo1
read_data data.patchyP2.lmp add append group Mo2

displace_atoms Mo1 move 5.0 5.0 5.0 units box
displace_atoms Mo2 move -5.0 -5.0 -5.0 units box

# Set the patchy particle interaction
fix CLfix CL rigid single
fix Mofix1 Mo1 rigid single
fix Mofix2 Mo2 rigid single


# Get data for box and particles
#read_data data.patchyP2.lmp add append shift 0.0 5.0 0.0

# Set the patchy particle interaction
#group Mo type 5 6 7
#fix Mofix Mo rigid single


# Neighbor list
neighbor 0.3 nsq
neigh_modify delay 5

minimize 1.0e-4 1.0e-6 1000 10000

fix 1 all langevin 1.0 1.0 50.0 12345
fix 2 all nve

thermo 50
compute t all temp
compute ep all pe
compute ek all ke
compute tm all momentum

dump 1 all atom 50 dump.patchy1

timestep 0.001
run 100000
