// COMSOL Multiphysics 6.3.0.335 model "firstTests.mph"
// Outline of the model tree

Geometry
  geom1 "Geometry 1" (2D, length unit m)
    imp1: Import
      type = native
      filename = /home/franpad/Documents/GitRepos/NanoTech-Masters/classNotes/3_Microfluidics/project/sandbox/Multiple_posts.mphbin
      meshfilename = /home/franpad/Documents/GitRepos/NanoTech-Masters/classNotes/3_Microfluidics/project/sandbox/Multiple_posts.mphbin
      lengthunittype = native
      virtualgeometrytype = native
      objectstoimporttype = native
      layerstype = native
      componentsstype = native
      compattrtag = imp1.component
      cellstype = native
      arcrecognitiontype = native
      simplifytype = native
    fin: Finalize "Form Union"

Materials
  mat1: Common "Water" on all domains
    def: def "Basic"
      thermalexpansioncoefficient = alpha_p(T)
      bulkviscosity = muB(T)
      dynamicviscosity = eta(T)
      ratioofspecificheat = gamma_w(T)
      electricconductivity = 5.5e-6[S/m]
      heatcapacity = Cp(T)
      density = rho(T)
      thermalconductivity = k(T)
      soundspeed = cs(T)
      eta: Piecewise
        arg = T
        pieces = 
          {273.15, 413.15, 1.3799566804-0.021224019151*T^1+1.3604562827E-4*T^2-4.6454090319E-7*T^3+8.9042735735E-10*T^4-9.0790692686E-13*T^5+3.8457331488E-16*T^6}
          {413.15, 553.75, 0.00401235783-2.10746715E-5*T^1+3.85772275E-8*T^2-2.39730284E-11*T^3}
        argunit = K
        fununit = Pa*s
      Cp: Piecewise | arg = T; pieces = {273.15, 553.75, 12010.1471-80.4072879*T^1+0.309866854*T^2-5.38186884E-4*T^3+3.62536437E-7*T^4}; argunit = K; fununit = J/(kg*K)
      rho: Piecewise
        arg = T
        smooth = contd1
        pieces = 
          {273.15, 293.15, 6.3092789034e-05*T^3-0.0603676398829*T^2+18.9229382407066*T-950.704055329848}
          {293.15, 373.15, 1.0335053319e-05*T^3-0.0133950656345*T^2+4.96928883266*T+432.257114008512}
        argunit = K
        fununit = kg/m^3
      k: Piecewise | arg = T; pieces = {273.15, 553.75, -0.869083936+0.00894880345*T^1-1.58366345E-5*T^2+7.97543259E-9*T^3}; argunit = K; fununit = W/(m*K)
      cs: Interpolation
        funcnametable = {cs, 1}
        table = {{273, 1403}, {278, 1427}, {283, 1447}, {293, 1481}, {303, 1507}, {313, 1526}, {323, 1541}, {333, 1552}, {343, 1555}, {353, 1555}, {363, 1550}, {373, 1543}}
        interp = piecewisecubic
        fununit = m/s
        argunit = K
      an1: Analytic | funcname = alpha_p; expr = -1/rho(T)*d(rho(T),T); args = T; fununit = 1/K; argunit = K
      an2: Analytic | funcname = gamma_w; expr = 1+(T/Cp(T))*(alpha_p(T)*cs(T))^2; args = T; fununit = 1; argunit = K
      an3: Analytic | funcname = muB; expr = 2.79*eta(T); args = T; fununit = Pa*s; argunit = K
  mat2: Common "Polyethylene" on no points
    def: def "Basic"
      thermalexpansioncoefficient = 150e-6[1/K]
      heatcapacity = 1900[J/(kg*K)]
      relpermittivity = 2.3
      density = 930[kg/m^3]
      thermalconductivity = 0.38[W/(m*K)]
    Enu: Enu "Young's modulus and Poisson's ratio"
      E = 1e9[Pa]

Physics
  mm: VolumeAveragedMixtureModelLaminar "Mixture Model, Laminar Flow" on all domains
    dependent variable j = {jx, jy, jz}
    mp1: MixtureProperties (default) | DispersedPhase = mat2; rhod_mat = from_mat
    init1: init "Initial Values 1" (default)
    wallbc1: WallBC "Wall 1" (default) | MixtureBoundaryCondition = NoSlip
    inl1: InletBoundary "Inlet 1" on boundaries 1 | U0in = 0.1; phid0 = 30
    out1: OutletBoundary "Outlet 1" on boundaries 4

Mesh
  mesh1 "Mesh 1"
    size: MeshSizeDefault | table = cfd; hmax = 0.00134; hmin = 6.0E-5; hcurve = 0.4; hgrad = 1.2; hauto = 6
    ftri2: FreeTri "Free Triangular 2" on all domains

Studies
  std1 "Study 1"
    stat: Stationary

Solver configurations
  sol1 "Solution 1" (study std1)
    v1: Variables "Dependent Variables 1"
    s1: Stationary "Stationary Solver 1"
      se1: Segregated
        ss1: SegregatedStep "Velocity j, Pressure p"
        ss2: SegregatedStep "Volume Fraction"
      d1: Direct "Direct, fluid flow variables (mm)"
      d2: Direct "Direct, volume fraction (mm)"

Datasets
  dset1: Solution | solution = sol1

Plots
  pg1: PlotGroup2D "Mixture (mm)" | data = dset1
    surf1: Surface "Velocity Magnitude" | expr = mm.J
  pg2: PlotGroup2D "Dispersed Phase (mm)" | data = dset1
    surf1: Surface "Dispersed Phase Volume Fraction" | expr = phid