// COMSOL Multiphysics 6.3.0.335 model "fifthTest.mph"
// Outline of the model tree

Parameters
  N_col = 5  // Colums of template
  N_row = 5  // Rows
  sigma_w = 0.11845[S/m]  // Conductivity of the ionic solution
  eps_r = 80.2  // Relative permitivity of the fluid
  zeta = -0.1[V]  // Zeta potential
  V_0 = 0.1[V]  // Initial Potential
  omega = 2*pi[rad]*8[Hz]  // Maximum value of the AC potential
  t = 0[s]  // Start time
  D = 1e-11[m^2/s]  // Diffusion coefficient of the solution
  c0 = 1[mol/m^3]  // Initial concentration
  particle_size = 5[um]  // Particle of disperse phase
  inlet_val = 0.1[mm/s]  // Mean inflow velocity
  phi = 0.3  // Packing fraciton of solids
  c_width = 100[um]  // Channel width
  L_hexa = 120[um]  // Length of a side of the hexagon
  angle = 60[degree]  // angle of hexagon
  aux = (L_hexa/2)*(2-cos(angle))/(cos(angle/2))
  col_sep = 2*L_hexa+2*c_width*cos(angle/2)+L_hexa  // Separation between columns
  row_sep = (2*aux+c_width)  // Separation between rows
  L_length = (N_col)*col_sep
  L_height = (N_row)*row_sep + c_width + 2*aux
  N_arrows = 100

Functions
  step1: Step | smooth = 0.1e-6

Selections
  sel1: Explicit "Inlet" on boundaries 1, 4, 7, 10, 13, 16, 19
  sel2: Explicit "Outlet" on boundaries 522-528
  sel3: Explicit "Vo_in" on boundaries 21, 57, 70, 82, 85, 157, 170, 182, 185, 257, 270, 282, 285, 357, 370, 382, 385, 457, 470, 482, 485
  sel4: Explicit "Vo_out" on boundaries 2, 58, 59, 71, 83, 158, 159, 171, 183, 258, 259, 271, 283, 358, 359, 371, 383, 458, 459, 471, 483

Geometry
  geom1 "Geometry 1" (2D, length unit µm)
    pol1: Polygon "Base-Hexagon-1"
      source = table
      table = 
        {L_hexa*cos(5*angle), L_hexa*sin(5*angle)}
        {L_hexa*cos(4*angle), L_hexa*sin(4*angle)}
        {L_hexa*cos(3*angle), L_hexa*sin(3*angle)}
        {L_hexa*cos(2*angle), L_hexa*sin(2*angle)}
        {L_hexa*cos(angle), L_hexa*sin(angle)}
        {L_hexa*cos(0), L_hexa*sin(0)}
    mov7: Move | input = pol1; disply = c_width + aux
    arr3: Array | input = mov7; size = {N_col+1, N_row+1}; fullsize = {N_col+1, N_row+1}; displ = {col_sep, row_sep}
    pol4: Polygon "Base-Hexagon-1.1"
      source = table
      table = 
        {L_hexa*cos(5*angle), L_hexa*sin(5*angle)}
        {L_hexa*cos(4*angle), L_hexa*sin(4*angle)}
        {L_hexa*cos(3*angle), L_hexa*sin(3*angle)}
        {L_hexa*cos(2*angle), L_hexa*sin(2*angle)}
        {L_hexa*cos(angle), L_hexa*sin(angle)}
        {L_hexa*cos(0), L_hexa*sin(0)}
    mov8: Move | input = pol4; displx = (2*aux+c_width)*cos(-angle/2); disply = (2*aux+c_width)*sin(-angle/2)
    mov6: Move | input = mov8; disply = c_width + aux
    arr4: Array | input = mov6(1); size = {N_col, N_row+2}; fullsize = {N_col, N_row+2}; displ = {col_sep, row_sep}
    sel1: ExplicitSelection "Hexagons"
      selection = arr3(1,1,1) domains 1; arr3(2,1,1) domains 1; arr3(3,1,1) domains 1; arr3(4,1,1) domains 1; arr3(5,1,1) domains 1; arr3(1,2,1) domains 1; arr3(2,2,1) domains 1; arr3(3,2,1) domains 1; arr3(4,2,1) domains 1; arr3(5,2,1) domains 1; arr3(1,3,1) domains 1; arr3(2,3,1) domains 1; arr3(3,3,1) domains 1; arr3(4,3,1) domains 1; arr3(5,3,1) domains 1; arr3(1,4,1) domains 1; arr3(2,4,1) domains 1; arr3(3,4,1) domains 1; arr3(4,4,1) domains 1; arr3(5,4,1) domains 1; arr4(1,1) domains 1; arr4(2,1) domains 1; arr4(3,1) domains 1; arr4(4,1) domains 1; arr4(1,2) domains 1; arr4(2,2) domains 1; arr4(3,2) domains 1; arr4(4,2) domains 1; arr4(1,3) domains 1; arr4(2,3) domains 1; arr4(3,3) domains 1; arr4(4,3) domains 1; arr4(1,4) domains 1; arr4(2,4) domains 1; arr4(3,4) domains 1; arr4(4,4) domains 1; arr4(1,5) domains 1; arr4(2,5) domains 1; arr4(3,5) domains 1; arr4(4,5) domains 1
    r1: Rectangle | size = {L_length, L_height}; pos = {0, -aux/2}
    dif1: Difference | input = r1; input2 = arr3, arr4
    del1: Delete "Delete Entities 1" | input = mov6(2)
    fin: Finalize "Form Union"

Materials
  mat1: Common "Material 1" on all domains
    def: def "Basic"
      density = 1e3[kg/m^3]
      dynamicviscosity = 1e-3[Pa*s]
      electricconductivity = sigma_w
      relpermittivity = eps_r

Physics
  spf: LaminarFlow on all domains
    dependent variable u = {u, v, w}
    ShapeProperty.order_fluid = 2
    fp1: FluidProperties (default)
    init1: init "Initial Values 1" (default)
    wallbc1: WallBC "Wall 1" (default)
    inl1: InletBoundary "Inlet 1" on selection sel1 | BoundaryCondition = FullyDevelopedFlow; Uavfdf = U0
    out1: OutletBoundary "Outlet 1" on selection sel2
    wallbc2: WallBC "Wall 2" on selection sel4
      BoundaryCondition = ElectroosmoticVelocity
      ElectroosmoticOption = BuiltinExpression
      zeta = zeta
      epsilonr = eps_r
      E = {ec.Ex*sin(omega*t), ec.Ey*sin(omega*t), 0}
    wallbc3: WallBC "Wall 3" on selection sel3
      BoundaryCondition = ElectroosmoticVelocity
      ElectroosmoticOption = BuiltinExpression
      zeta = zeta
      epsilonr = eps_r
      E = {ec.Ex*sin(omega*t), ec.Ey*sin(omega*t), 0}
  tds: DilutedSpecies "Transport of Diluted Species" on all domains
    dependent variable c
    ShapeProperty.order_concentration = 2
    cdm1: Fluid (default) | D_c = D
    nflx1: NoFlux (default)
    init1: init "Initial Values 1" (default)
    conc1: Concentration on selection sel1 | species = 1; c0 = c0*step1(y[1/m])
    out1: Outflow on selection sel2
  ec: ConductiveMedia "Electric Currents" on all domains
    dependent variable V
    cucn1: CurrentConservation (default)
    ein1: ElectricInsulation (default)
    init1: init "Initial Values 1" (default)
    pot1: ElectricPotential on selection sel3 | V0 = V_0
    pot2: ElectricPotential on selection sel4 | V0 = -V_0

Multiphysics
  rfd1: ReactingFlowDS "Reacting Flow, Diluted Species 1" on all domains | Fluid_physics = spf; Species_physics = tds

Mesh
  mesh1 "Mesh 1"
    size: MeshSizeDefault | table = cfd; hauto = 4
    ftri1: FreeTri "Free Triangular 1" on remaining entities

Studies
  std1 "Study 1"
    stat: Stationary