// COMSOL Multiphysics 6.3.0.335 model "electroescence.mph"
// Outline of the model tree

Parameters
  perm_water = 80  // Permittivity, water
  perm_oil = 2.2  // Permittivity, oil
  u_in = 50[mm/s]  // Average inlet velocity
  u_max = 3/2*u_in  // Approximated maximum velocity
  sigma = 0.031[N/m]  // Surface tension coefficient
  V0 = 5[kV]  // Applied voltage

Functions
  step1: Step | location = 0.005; smooth = 0.01

Variables
  var1 "Variables 1"
    Tem11 = -epsilon0_const*es.epsilonr_iso/2*(es.Ex^2+es.Ey^2)+epsilon0_const*es.epsilonr_iso*es.Ex^2  // Maxwell stress tensor, 11 component
    Tem22 = -epsilon0_const*es.epsilonr_iso/2*(es.Ex^2+es.Ey^2)+epsilon0_const*es.epsilonr_iso*es.Ey^2  // Maxwell stress tensor, 22-component
    Tem12 = epsilon0_const*es.epsilonr_iso*es.Ex*es.Ey  // Maxwell stress tensor, 12 component
    Tem21 = epsilon0_const*es.epsilonr_iso*es.Ex*es.Ey  // Maxwell stress tensor, 21-component
    Fx = d(Tem11,x)+d(Tem12,y)  // Force, x-component
    Fy = d(Tem21,x)+d(Tem22,y)  // Force, y component

Selections
  sel1: Explicit "Outlet" on boundaries 4
  sel2: Explicit "Inlet" on boundaries 1
  sel3: Explicit "Oil/Water" on boundaries 5-12

Geometry
  geom1 "Geometry 1" (2D, length unit mm)
    r1: Rectangle | size = {30, 10}
    c1: Circle | r = 1.6; pos = {4, 6}
    c2: Circle | r = 1.2; pos = {7, 3.5}
    fin: Finalize "Form Union"

Materials
  mpmat1: Multiphase "Multiphase Material 1" on all domains
    def: def "Basic"
      MIXING_RULE_PREFIX:relpermittivity = volume_average
      MIXING_RULE_PREFIX:density = volume_average
      MIXING_RULE_PREFIX:dynamicviscosity = volume_average
      MIXING_RULE_PREFIX:thermalexpansioncoefficient = volume_average
      MIXING_RULE_PREFIX:bulkviscosity = volume_average
      MIXING_RULE_PREFIX:ratioofspecificheat = mass_average
      MIXING_RULE_PREFIX:electricconductivity = volume_average
      MIXING_RULE_PREFIX:heatcapacity = mass_average
      MIXING_RULE_PREFIX:thermalconductivity = volume_average
      MIXING_RULE_PREFIX:soundspeed = volume_average
    phase1: PhaseLink "Phase 1" | link = mat1
    phase2: PhaseLink "Phase 2" | link = mat2
  mat1: Common "Water"
    def: def "Basic"
      thermalexpansioncoefficient = alpha_p(T)
      bulkviscosity = muB(T)
      dynamicviscosity = eta(T)
      ratioofspecificheat = gamma_w(T)
      electricconductivity = 5.5e-6[S/m]
      heatcapacity = Cp(T)
      density = rho(T)
      thermalconductivity = k(T)
      soundspeed = cs(T)
      relpermittivity = perm_water
      eta: Piecewise
        arg = T
        pieces = 
          {273.15, 413.15, 1.3799566804-0.021224019151*T^1+1.3604562827E-4*T^2-4.6454090319E-7*T^3+8.9042735735E-10*T^4-9.0790692686E-13*T^5+3.8457331488E-16*T^6}
          {413.15, 553.75, 0.00401235783-2.10746715E-5*T^1+3.85772275E-8*T^2-2.39730284E-11*T^3}
        argunit = K
        fununit = Pa*s
      Cp: Piecewise | arg = T; pieces = {273.15, 553.75, 12010.1471-80.4072879*T^1+0.309866854*T^2-5.38186884E-4*T^3+3.62536437E-7*T^4}; argunit = K; fununit = J/(kg*K)
      rho: Piecewise
        arg = T
        smooth = contd1
        pieces = 
          {273.15, 293.15, 6.3092789034e-05*T^3-0.0603676398829*T^2+18.9229382407066*T-950.704055329848}
          {293.15, 373.15, 1.0335053319e-05*T^3-0.0133950656345*T^2+4.96928883266*T+432.257114008512}
        argunit = K
        fununit = kg/m^3
      k: Piecewise | arg = T; pieces = {273.15, 553.75, -0.869083936+0.00894880345*T^1-1.58366345E-5*T^2+7.97543259E-9*T^3}; argunit = K; fununit = W/(m*K)
      cs: Interpolation
        funcnametable = {cs, 1}
        table = {{273, 1403}, {278, 1427}, {283, 1447}, {293, 1481}, {303, 1507}, {313, 1526}, {323, 1541}, {333, 1552}, {343, 1555}, {353, 1555}, {363, 1550}, {373, 1543}}
        interp = piecewisecubic
        fununit = m/s
        argunit = K
      an1: Analytic | funcname = alpha_p; expr = -1/rho(T)*d(rho(T),T); args = T; fununit = 1/K; argunit = K
      an2: Analytic | funcname = gamma_w; expr = 1+(T/Cp(T))*(alpha_p(T)*cs(T))^2; args = T; fununit = 1; argunit = K
      an3: Analytic | funcname = muB; expr = 2.79*eta(T); args = T; fununit = Pa*s; argunit = K
  mat2: Common "Material 2"
    def: def "Basic"
      relpermittivity = perm_oil
      density = 884[kg/m^3]
      dynamicviscosity = 0.474[Pa*s]

Physics
  es: Electrostatics on all domains
    dependent variable V
    fsp1: FreeSpace (default)
    zc1: ZeroCharge (default)
    init1: init "Initial Values 1" (default) | V = y*V0/10[mm]
    ccnf1: ChargeConservationFluid "Charge Conservation in Fluids 1" on all domains
    pot1: ElectricPotential on boundaries 3 | V0 = V0
    gnd1: Ground on boundaries 2
  spf: LaminarFlow on all domains
    dependent variable u = {u, v, w}
    fp1: FluidProperties (default)
    init1: init "Initial Values 1" (default)
    wallbc1: WallBC "Wall 1" (default)
    vf1: VolumeForce on all domains | F = {Fx, Fy, 0}
    inl1: InletBoundary "Inlet 1" on selection sel2
      BoundaryCondition = FullyDevelopedFlow
      Uavfdf = u_in*step1(t*1[1/s])
    out1: OutletBoundary "Outlet 1" on selection sel1 | BoundaryCondition = FullyDevelopedFlow
  pf: PhaseField "Phase Field in Fluids" on all domains
    dependent variable phipf
    pfm1: PhaseFieldModel (default) | epsilon_pf = 0.15[mm]; chiOption = velocity; U = u_max
    init1: init "Initial Values 1" (default)
    initfluid2: initFluid2 "Initial Values, Fluid 2" on domains 1
    ww1: WettedWall (default)
    inl1: InletBoundary "Inlet 1" on selection sel2 | pfcond = Fluid2pf
    out1: Outlet on selection sel1

Multiphysics
  tpf1: TwoPhaseFlowPhaseField on all domains
    multiphaseMaterialList = mpmat1
    SurfaceTensionCoefficient = userdef
    sigma = sigma
    Fluid_physics = spf
    Mathematics_physics = pf

Mesh
  mesh1 "Mesh 1" (physics-controlled)
    size: MeshSizeDefault | table = cfd; hauto = 4

Studies
  std1 "Study 1"
    phasei: PhaseInitialization | ftplistmethod = manual; solve for = {es, pf}
    time: Transient "Time Dependent"
      tlist = range(0,0.05,0.3)
      initialtime = 0
      ftplistmethod = manual
      useinitsol = on
      initstudy = std1
      notsolmethod = sol
      notstudy = std1

Solver configurations
  sol1 "Solution 1" (study std1)
    v1: Variables "Dependent Variables 1"
    s1: Stationary "Stationary Solver 1"
      fc1: FullyCoupled
      d1: Direct "Direct, interface distance (pf)"
    su1: StoreSolution "Solution Store 1"
    v2: Variables "Dependent Variables 2" | scalemethod = manual
      comp1_u: Field "Velocity Field (comp1.u)" | scalemethod = manual; scaleval = u_max
      comp1_V: Field "Electric Potential (comp1.V)" | scalemethod = manual; scaleval = 1e3
    t1: Time "Time-Dependent Solver 1"
      dDef: Direct
      se1: Segregated
        ss2: SegregatedStep "Velocity u, Pressure p"
          segvar = {comp1_u, comp1_p, comp1_spf_inl1_Pinlfdf, comp1_spf_out1_Pinlfdf, comp1_V}
        ss3: SegregatedStep "Phase Field Variables"
      d1: Direct "Direct, fluid flow variables (spf)"
      d2: Direct "Direct, phase field variables (pf)"
  sol2 "Solution Store 1" (study std1)

Datasets
  dset1: Solution | solution = sol1
  dset2: Solution | solution = sol2